a := -7
b := 7
c := 15
A := -2
B := 0
ξ := -1
f(x) := x^3 + a*x^2 + b*x + c
fd(x) := d/dx(f(x))
fdd(x) := d^2/dx^2(f(x))
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fd(x) → 3*x^2 - 14*x + 7
fdd(x) → 6*x - 14
f(A)*fdd(A) = 910
f(B)*fdd(B) = -210
xn(n) :=
    B if n == 0
    (xn(n - 1) - f(xn(n - 1))/(f(xn(n - 1)) - f(A))*(xn(n - 1) - A)) otherwise
Δn(n) := |xn(n) - ξ|
xn(1) = -0.6
xn(2) = -0.862159
Δn(1) = 0.4
Δn(2) = 0.137841
xn(3) = -0.955309
xn(4) = -0.985813
Δn(3) = 0.0446905
Δn(4) = 0.014187
xn(5) = -0.995527
xn(6) = -0.998593
Δn(5) = 0.00447293
Δn(6) = 0.00140718
xn(7) = -0.999558
xn(8) = -0.999861
Δn(7) = 0.000442397
Δn(8) = 0.000139053
xn(9) = -0.999956
xn(10) = -0.999986
Δn(9) = 4.37037e-5
Δn(10) = 1.37356e-5
xn(n) := xn(n - 1) - f(xn(n - 1))/fd(xn(n - 1))
Δn(n) := |f(xn(n))/fd(xn(n))|
xn(1) = -2.14286
xn(2) = -1.08932
Δn(1) = 0.826826
Δn(2) = 0.0861741
xn(3) = -1.00867
xn(4) = -1.00086
Δn(3) = 0.00864313
Δn(4) = 0.000856122
xn(5) = -1.00008
xn(6) = -1.00001
Δn(5) = 8.462e-5
Δn(6) = 8.35995e-6
